// COMSOL Multiphysics 5.5.0.359 model "A1.mph"
// Outline of the model tree
// Unit system: none

Geometry
  geom1 "Geometry 1" (2D, length unit m)
    c1: Circle | r = 5
    fin: Finalize "Form Union"

Physics
  c: CoefficientFormPDE on all domains
    dependent variable H
    cfeq1: CoefficientFormPDE (default) | c = {1, 0, 0, 1}; f = 1; da = 1
    zflx1: ZeroFluxBoundary "Zero Flux 1" (default)
    init1: init "Initial Values 1" (default)
    peq1: PoissonEquation "Poisson's Equation 1" on all domains | f = -6*x; c = {-1, 0, 0, -1}
    dir1: DirichletBoundary "Dirichlet Boundary Condition 1" on all boundaries | r = -x^3-y*x-6*y+15

Mesh
  mesh1 "Mesh 1" (physics-controlled)
    size: MeshSizeDefault | hauto = 4

Studies
  std1 "Study 1"
    stat: Stationary

Solver configurations
  sol1 "Solution 1" (study std1)
    v1: Variables "Dependent Variables 1"
    s1: Stationary "Stationary Solver 1"
      dDef: Direct
      fc1: FullyCoupled | linsolver = dDef

Datasets
  dset1: Solution | solution = sol1

Plots
  pg1: PlotGroup2D "2D Plot Group 1" | data = dset1
    surf1: Surface (disabled) | expr = H
    con1: Contour | expr = H
    str1: Streamline on all boundaries | expr = {Hx, Hy}
    arws1: ArrowSurface | expr = {Hx, Hy}; arrowlength = normalized