// COMSOL Multiphysics 5.5.0.359 model "Aandra.mph"
// Outline of the model tree
// Unit system: none

Variables
  var1 "Variables 1" on boundaries 7, 8, 10, 13
    Tx = -t1x
    Ty = -t1y
  var2 "Variables 2" on boundaries 1, 2
    Tx = t1x
    Ty = t1y

Selections
  sel1: Explicit on no boundaries
  sel2: Explicit on boundaries 5-13

Geometry
  geom1 "Geometry 1" (2D, length unit m)
    c1: Circle | r = 8
    c2: Circle
    pol1: Polygon | source = table; table = {{0, 0}, {1, 1}, {0, 1}}
    fin: Finalize "Form Union"

Physics
  c: CoefficientFormPDE on all domains
    dependent variable A
    cfeq1: CoefficientFormPDE (default) | c = {1, 0, 0, 1}; f = 1; da = 1
    zflx1: ZeroFluxBoundary "Zero Flux 1" (default)
    init1: init "Initial Values 1" (default)
    dir1: DirichletBoundary "Dirichlet Boundary Condition 1" on all boundaries | r = -x^3+5*y

Mesh
  mesh1 "Mesh 1" (physics-controlled)
    size: MeshSizeDefault | hauto = 1

Studies
  std1 "Study 1"
    stat: Stationary

Solver configurations
  sol1 "Solution 1" (study std1)
    v1: Variables "Dependent Variables 1"
    s1: Stationary "Stationary Solver 1"
      dDef: Direct
      fc1: FullyCoupled | linsolver = dDef

Datasets
  dset1: Solution | solution = sol1

Derived values
  int1: IntLine "Line Integration 1" on boundaries 7, 8, 10, 13
    data = dset1
    table = tbl1
    expr = {, (-y*Tx+x*Ty), x^2*y*(-Tx)+(x^3+y^3)*(-Ty), }
  int2: IntLine "Line Integration 2" on boundaries 1, 2 | data = dset1; table = tbl2; expr = {A, 3*x*y*(-Tx)+y*(-Ty)}

Tables
  tbl2: Table
    // Line Integration 2
    A (m) | 3*x*y*(-Tx)+y*(-Ty)
    4.17938 | 0.103553

Plots
  pg1: PlotGroup2D "2D Plot Group 1" | data = dset1
    surf1: Surface (disabled) | expr = A
    arwl1: ArrowLine | expr = {Tx, Ty}