// COMSOL Multiphysics 5.5.0.359 model "Aförsta.mph"
// Outline of the model tree

Geometry
  geom1 "Geometry 1" (2D, length unit m)
    c1: Circle | r = 5
    fin: Finalize "Form Union"

Physics
  c: CoefficientFormPDE on all domains
    dependent variable H
    ShapeProperty.order = 2
    cfeq1: CoefficientFormPDE (default) | c = {1, 0, 0, 1}; f = 1; da = 1
    zflx1: ZeroFluxBoundary "Zero Flux 1" (default)
    init1: init "Initial Values 1" (default)
    peq1: PoissonEquation "Poisson's Equation 1" on all domains | f = -6*x; c = {-1, 0, 0, -1}
    dir1: DirichletBoundary "Dirichlet Boundary Condition 1" on all boundaries | r = -x^3-x*y-6*y+15

Mesh
  mesh1 "Mesh 1" (physics-controlled)
    size: MeshSizeDefault | hauto = 1

Studies
  std1 "Study 1"
    stat: Stationary

Solver configurations
  sol1 "Solution 1" (study std1)
    v1: Variables "Dependent Variables 1"
    s1: Stationary "Stationary Solver 1"
      dDef: Direct
      fc1: FullyCoupled | linsolver = dDef

Datasets
  dset1: Solution | solution = sol1
  cln1: CutLine2D | data = dset1; genpoints = {{-2, -2}, {2, 2}}

Plots
  pg1: PlotGroup2D "2D Plot Group 1" | data = dset1
    surf1: Surface | expr = H
  pg2: PlotGroup1D "1D Plot Group 2" | data = dset1
    lngr1: LineGraph | data = cln1; expr = H
    lngr2: LineGraph | data = cln1; expr = Hx
    lngr3: LineGraph | data = cln1; expr = Hy
    lngr4: LineGraph | data = cln1; expr = Hxx
  pg3: PlotGroup2D "2D Plot Group 3" | data = dset1
    arws1: ArrowSurface | expr = {1, y}
    str1: Streamline on all boundaries | data = dset1; expr = {1, y}