// COMSOL Multiphysics 5.5.0.359 model "Asista.mph"
// Outline of the model tree
// Unit system: none

Variables
  var1 "Variables 1"
    A0 = 2*x*y
    B0 = 4*x+y*pi

Geometry
  geom1 "Geometry 1" (2D, length unit m)
    c1: Circle | r = 8
    c2: Circle | pos = {6, 3}
    c3: Circle | pos = {-4, -2}; r = 3
    dif1: Difference | input = c1, c2; input2 = c2, c3
    fin: Finalize "Form Union"

Physics
  c: CoefficientFormPDE on all domains
    dependent variable u = {A, B}
    cfeq1: CoefficientFormPDE (default)
      c = {{1, 0, 0, 1}, {0, 0, 0, 0}, {0, 0, 0, 0}, {1, 0, 0, 1}}
      f = {1, 1}
      da = {1, 0, 0, 1}
    zflx1: ZeroFluxBoundary "Zero Flux 1" (default)
    init1: init "Initial Values 1" (default) | A = A0; B = B0
    dir1: DirichletBoundary "Dirichlet Boundary Condition 1" on all boundaries | r = {0, 0}

Mesh
  mesh1 "Mesh 1" (physics-controlled)

Studies
  std1 "Study 1"
    stat: Stationary

Solver configurations
  sol1 "Solution 1" (study std1)
    v1: Variables "Dependent Variables 1"
    s1: Stationary "Stationary Solver 1"
      dDef: Direct
      fc1: FullyCoupled | linsolver = dDef

Datasets
  dset1: Solution | solution = sol1

Derived values
  int1: IntLine "Line Integration 1" on all boundaries | data = dset1; table = tbl5; expr = {-(A*t1x+B*t1y), }
  int2: IntSurface "Surface Integration 2" on all domains | data = dset1; table = tbl4; expr = {(Bx-Ay), }

Tables
  tbl1: Table
    // Line Integration 1
    Time | A*t1x+B*t1y
    0 | 188.494
  tbl3: Table
    // Surface Integration 2
    Time | (Bx-Ay)
    0 | -188.494
  tbl4: Table
    // Surface Integration 2
    Time | (Bx-Ay) | (Bx-Ay)
    0 | 490.091 | 490.091
  tbl5: Table
    // Line Integration 1
    Time | -(A*t1x+B*t1y)
    0 | 490.091

Plots
  pg1: PlotGroup2D "2D Plot Group 1" | data = dset1
    surf1: Surface (disabled) | expr = A
    arwl1: ArrowLine
      expr = {-t1x, -t1y}
      typeintitle = off
      prefixintitle = Line integral = 490.09
      suffixintitle = Surface integral = 490.09
      arrowcount = 100

Exports
  img1: Image | size = current; unit = px; width = 800; height = 600