// COMSOL Multiphysics 5.5.0.359 model "Atredje.mph"
// Outline of the model tree
// Unit system: none

Variables
  var1 "Variables 1"
    A1 = -1*(pi)^2*(y+6)*y*sin(pi*x*y)
    A2 = pi*cos(pi*y*x)-((pi)^2)*(y+6)*x*sin(pi*y*x)
    A0 = pi*(y+6)*cos(pi*x*y)

Geometry
  geom1 "Geometry 1" (2D, length unit m)
    c1: Circle | r = 8
    ls1: LineSegment | specify1 = coord; coord1 = {4, -6}; specify2 = coord; coord2 = {3, -5}
    ls2: LineSegment | specify1 = coord; coord1 = {4, -4}; specify2 = coord; coord2 = {3, -5}
    ls3: LineSegment | specify1 = coord; coord1 = {4, -4}; specify2 = coord; coord2 = {3, 0}
    ls4: LineSegment | specify1 = coord; coord1 = {4, 6}; specify2 = coord; coord2 = {3, 0}
    fin: Finalize "Form Union"

Physics
  c: CoefficientFormPDE on all domains
    dependent variable A
    cfeq1: CoefficientFormPDE (default) | c = {1, 0, 0, 1}; f = 1; da = 1
    zflx1: ZeroFluxBoundary "Zero Flux 1" (default)
    init1: init "Initial Values 1" (default) | A = A0
    dir1: DirichletBoundary "Dirichlet Boundary Condition 1" on all boundaries | r = pi*(y+6)*cos(pi*y*x)

Mesh
  mesh1 "Mesh 1" (physics-controlled)

Studies
  std1 "Study 1"
    stat: Stationary

Solver configurations
  sol1 "Solution 1" (study std1)
    v1: Variables "Dependent Variables 1"
    s1: Stationary "Stationary Solver 1"
      dDef: Direct
      fc1: FullyCoupled | linsolver = dDef

Datasets
  dset1: Solution | solution = sol1

Derived values
  int1: IntLine "Line Integration 1" on all boundaries | data = dset1; table = tbl1; expr = Ax*t1x+Ay*t1y

Tables
  tbl1: Table
    // Line Integration 1
    Time | Ax*t1x+Ay*t1y
    0 | 37.7026

Plots
  pg1: PlotGroup2D "2D Plot Group 1" | data = dset1
    surf1: Surface | expr = A
  pg2: PlotGroup1D "1D Plot Group 2" | data = dset1
    lngr1: LineGraph on boundaries 1-4 | expr = A1
    lngr2: LineGraph on boundaries 1-4 | expr = A2