// COMSOL Multiphysics 5.5.0.359 model "avaB.mph"
// Outline of the model tree

Parameters
  L = pi
  c = 3[m/s]
  u0 = 0
  upi = 0
  udt = 0

Variables
  var1 "Variables 1"
    uanalytic = 3*cos(6*t)*sin(2*x)+12*cos(39*t)*sin(13*x)

Geometry
  geom1 "Geometry 1" (1D, length unit m)
    i1: Interval | coord = {0, L}
    fin: Finalize "Form Union"

Physics
  c: CoefficientFormPDE on all domains
    dependent variable u
    cfeq1: CoefficientFormPDE (default) | c = c^2; f = 0; ea = 1; da = 0
    zflx1: ZeroFluxBoundary "Zero Flux 1" (default)
    init1: init "Initial Values 1" (default) | u = 3*sin(2*x)+12*sin(13*x)
    dir1: DirichletBoundary "Dirichlet Boundary Condition 1" on all boundaries | r = 0

Mesh
  mesh1 "Mesh 1" (physics-controlled)
    size: MeshSizeDefault | hauto = 1

Studies
  std1 "Study 1"
    time: Transient "Time Dependent" | tlist = range(0,0.1,2); usertol = on; rtol = 10^(-5)

Solver configurations
  sol1 "Solution 1" (study std1)
    v1: Variables "Dependent Variables 1"
    t1: Time "Time-Dependent Solver 1" | tlist = range(0,0.1,2); rtol = 10^(-5); atolglobalfactor = 10^-6
      dDef: Direct
      fc1: FullyCoupled | linsolver = dDef

Datasets
  dset1: Solution | solution = sol1
  cpt1: CutPoint1D | data = dset1; pointx = 1.5

Plots
  pg1: PlotGroup1D "1D Plot Group 1" | data = dset1
    lngr1: LineGraph on all domains | expr = u; xdata = expr; xdataexpr = x
    lngr2: LineGraph on all domains | expr = u-uanalytic
  pg2: PlotGroup1D "1D Plot Group 2" | data = cpt1; xlabel = Arc length (m); ylabel = Dependent variable u (1)
    ptgr1: PointGraph | expr = u
    ptgr2: PointGraph | expr = u-uanalytic

Exports
  anim2: Animation | target = player