// COMSOL Multiphysics 5.5.0.359 model "avaB2.mph"
// Outline of the model tree

Parameters
  a = 0.5
  h0 = 1
  alpha = 1
  L = 1

Variables
  var1 "Variables 1"
    uanalytic = ((2*h0)/(pi^2*a*(1-a)))*sin(a*pi)*sin(pi*x)*cos(pi*alpha*t)
    f = if(x<a, h0*(x/a), h0*((L-x)/(L-a)))
    g = 0
    uanalytic3 = ((2*h0)/((pi^2)*a*(1-a)))*sum((1/n^2)*sin(n*a*pi)*sin(n*pi*x)*cos(n*pi*alpha*t), n, 1, 3)

Geometry
  geom1 "Geometry 1" (1D, length unit m)
    i1: Interval | coord = {0, L}
    fin: Finalize "Form Union"

Physics
  c: CoefficientFormPDE on all domains
    dependent variable u
    cfeq1: CoefficientFormPDE (default) | c = alpha^2; f = 0; ea = 1; da = 0
    zflx1: ZeroFluxBoundary "Zero Flux 1" (default)
    init1: init "Initial Values 1" (default) | u = f; ut = g
    dir1: DirichletBoundary "Dirichlet Boundary Condition 1" on all boundaries | r = 0

Mesh
  mesh1 "Mesh 1" (physics-controlled)
    size: MeshSizeDefault | hauto = 1

Studies
  std1 "Study 1"
    time: Transient "Time Dependent" | tlist = range(0,0.01,3); usertol = on; rtol = 10^-5

Solver configurations
  sol1 "Solution 1" (study std1)
    v1: Variables "Dependent Variables 1"
    t1: Time "Time-Dependent Solver 1" | tlist = range(0,0.01,3); rtol = 10^-5; atolglobalfactor = 10^-6
      dDef: Direct
      fc1: FullyCoupled | linsolver = dDef

Datasets
  dset1: Solution | solution = sol1

Plots
  pg1: PlotGroup1D "1D Plot Group 1" | data = dset1
    lngr1: LineGraph on all domains | expr = u; xdata = expr; xdataexpr = x
    lngr2: LineGraph on all domains | expr = u-uanalytic3