// COMSOL Multiphysics 5.5.0.359 model "avaB4.mph"
// Outline of the model tree
// Unit system: none

Parameters
  pl1 = 0.4
  pl2 = 1.2
  L = 2
  a = 1
  alpha = 0.4
  beta = 0.5
  h0 = 0.6
  gamma = 0.6

Variables
  var1 "Variables 1"
    pl = pl1*(x<a)+pl2*(a<x)
    f = (alpha<x)*(x<beta)*h0*((x-alpha)/(beta-alpha))+h0*((gamma-x)/(gamma-beta))*(x>beta)*(gamma>x)

Geometry
  geom1 "Geometry 1" (1D, length unit m)
    i1: Interval | coord = {0, L}
    fin: Finalize "Form Union"

Physics
  c: CoefficientFormPDE on all domains
    dependent variable u
    cfeq1: CoefficientFormPDE (default) | c = alpha^2; f = 0; ea = pl; da = 0
    zflx1: ZeroFluxBoundary "Zero Flux 1" (default)
    init1: init "Initial Values 1" (default) | u = f
    dir1: DirichletBoundary "Dirichlet Boundary Condition 1" on all boundaries | r = 0

Mesh
  mesh1 "Mesh 1" (physics-controlled)
    size: MeshSizeDefault | hauto = 1

Studies
  std1 "Study 1"
    time: Transient "Time Dependent" | tlist = range(0,0.001,1)

Solver configurations
  sol1 "Solution 1" (study std1)
    v1: Variables "Dependent Variables 1"
    t1: Time "Time-Dependent Solver 1" | tlist = range(0,0.001,1); rtol = 10^-5; atolglobalfactor = 10^-6
      dDef: Direct
      fc1: FullyCoupled | linsolver = dDef

Datasets
  dset1: Solution | solution = sol1

Plots
  pg1: PlotGroup1D "1D Plot Group 1" | data = dset1
    lngr1: LineGraph on all domains | expr = u; xdata = expr; xdataexpr = x

Exports
  anim16: Animation | target = player